# OpenSim document version 40000
AnalyzeTool subject_scale_run:
  model_file: subject_run_adjusted.osim
  replace_force_set: false
  force_set_files: so_actuators.xml
  results_directory: .
  output_precision: 8
  initial_time: 0.23
  final_time: 1
  solve_for_equilibrium_for_auxiliary_states: false
  maximum_number_of_integrator_steps: 20000
  maximum_integrator_step_size: 1
  minimum_integrator_step_size: 1e-8
  integrator_error_tolerance: 1e-5
  external_loads_file: grf_run.xml
  coordinates_file: ik_output_run.mot
  lowpass_cutoff_frequency_for_coordinates: -1
  AnalysisSet Analyses:
    StaticOptimization: start_time=0.23 end_time=5.32 step_interval=1 in_degrees=true use_model_force_set=true
        activation_exponent=3 use_muscle_physiology=true optimizer_convergence_criterion=0.0001
        optimizer_max_iterations=100
